package omp 4
suffix omp
log data/log.${rho}_${T}
units lj
dimension 3
boundary p p p
atom_style atomic

lattice fcc ${rho}
region simbox block 0 10 0 10 0 10
create_box 1 simbox

mass 1 1.0
pair_style lj/cut 3.0
pair_coeff 1 1 1.0 1.0 3.0

create_atoms 1 box
velocity all create ${T} 87287
fix 1 all nve

dump 1 all custom 100 data/dump.${rho}_${T} id type x y z vx vy vz
thermo_style custom step time press temp ke pe etotal cpuremain spcpu
thermo 1

run 5000
